// SBML level 3 version 2
// Created with https://github.com/matthiaskoenig/sbmlutils.

model talinolol_intestine(PODOSE_tal, POSTOMACH_tal, Ka_dis_tal, Mr_tal, Vext, Vgu, Vfeces, Vstomach, Vduodenum, tal_ext, tal_feces, tal_duodenum)
  // Model for talinolol absorption in the small intestine
  // Model for talinolol absorption and effect of P-GP
  // Terms of use
  // The content of this model has been carefully created in a manual research effort. This file has been created by Matthias König using sbmlutils. For questions contact koenigmx@hu-berlin.de. Copyright © 2023 Matthias König.
  // This work is licensed under a Creative Commons Attribution 4.0 International License.
  // Redistribution and use of any part of this model, with or without modification, are permitted provided that the following conditions are met:
  // Redistributions of this SBML file must retain the above copyright notice, this list of conditions and the following disclaimer.
  // Redistributions in a different form must reproduce the above copyright notice, this list of conditions and the following disclaimer in the documentation and/or other materials provided with the distribution.
  // This model is distributed in the hope that it will be useful, but WITHOUT ANY WARRANTY; without even the implied warranty of MERCHANTABILITY or FITNESS FOR A PARTICULAR PURPOSE.
  // model units - substance: mmole, time: min, volume: litre, area: m2, length: metre, extent: mmole

  // Compartments:
  compartment Vext = 1 litre; Vext is "plasma";  // SBO:0000290 ncit:C13356 BTO:0000131
  compartment Vgu = 1.2825 litre; Vgu is "intestine";  // SBO:0000290 FMA:45615 BTO:0000545 ncit:C12736
  compartment Vfeces = 1 litre;  // SBO:0000290 FMA:64183 ncit:C13234 BTO:0000440
  compartment Vstomach = 1 litre;  // SBO:0000290 FMA:7148 ncit:C12391 UBERON:0000945
  // Modelled as a tube with area 2*pi*r^2 and volume area*length.
  compartment Vduodenum = 0.322563 litre; Vduodenum is "small intestine duodenum D";  // SBO:0000290 FMA:7206 UBERON:0002114
  compartment Ventero_duodenum; Ventero_duodenum has litre; Ventero_duodenum is "enterocytes small intestine duodenum D";  // SBO:0000290
  // Modelled as a tube with area 2*pi*r^2 and volume area*length.
  compartment Vjejunum_1 = 0.601183 litre; Vjejunum_1 is "small intestine jejunum J1";  // SBO:0000290 FMA:7207 UBERON:0002115
  compartment Ventero_jejunum_1; Ventero_jejunum_1 has litre; Ventero_jejunum_1 is "enterocytes small intestine jejunum J1";  // SBO:0000290
  // Modelled as a tube with area 2*pi*r^2 and volume area*length.
  compartment Vjejunum_2 = 0.601183 litre; Vjejunum_2 is "small intestine jejunum J2";  // SBO:0000290 FMA:7207 UBERON:0002115
  compartment Ventero_jejunum_2; Ventero_jejunum_2 has litre; Ventero_jejunum_2 is "enterocytes small intestine jejunum J2";  // SBO:0000290
  // Modelled as a tube with area 2*pi*r^2 and volume area*length.
  compartment Vileum_1 = 0.9447162 litre; Vileum_1 is "small intestine ileum I1";  // SBO:0000290 FMA:7208 UBERON:0002116
  compartment Ventero_ileum_1; Ventero_ileum_1 has litre; Ventero_ileum_1 is "enterocytes small intestine ileum I1";  // SBO:0000290
  // Modelled as a tube with area 2*pi*r^2 and volume area*length.
  compartment Vileum_2 = 0.9447162 litre; Vileum_2 is "small intestine ileum I2";  // SBO:0000290 FMA:7208 UBERON:0002116
  compartment Ventero_ileum_2; Ventero_ileum_2 has litre; Ventero_ileum_2 is "enterocytes small intestine ileum I2";  // SBO:0000290
  // Modelled as a tube with area 2*pi*r^2 and volume area*length.
  compartment Vcolon = 3.817035 litre; Vcolon is "large intestine colon";  // SBO:0000290 FMA:14543 UBERON:000115
  compartment Ventero_colon; Ventero_colon has litre; Ventero_colon is "enterocytes large intestine colon";  // SBO:0000290

  // Species:
  substanceOnly species $tal_stomach in Vstomach = 0; tal_stomach is "talinolol (stomach)";  // SBO:0000247 pubchem.compound:68770 CHEBI:135533
  species tal_ext in Vext = 0; tal_ext is "talinolol (plasma)";  // SBO:0000247 pubchem.compound:68770 CHEBI:135533
  substanceOnly species tal_feces in Vfeces = 0; tal_feces is "talinolol (feces)";  // SBO:0000247 pubchem.compound:68770 CHEBI:135533
  species tal_duodenum in Vduodenum = 0; tal_duodenum is "talinolol (small intestine duodenum D)";  // SBO:0000247 pubchem.compound:68770 CHEBI:135533
  species tal_entero_duodenum in Ventero_duodenum = 0; tal_entero_duodenum is "talinolol enterocytes (small intestine duodenum D)";  // SBO:0000247 pubchem.compound:68770 CHEBI:135533
  species tal_jejunum_1 in Vjejunum_1 = 0; tal_jejunum_1 is "talinolol (small intestine jejunum J1)";  // SBO:0000247 pubchem.compound:68770 CHEBI:135533
  species tal_entero_jejunum_1 in Ventero_jejunum_1 = 0; tal_entero_jejunum_1 is "talinolol enterocytes (small intestine jejunum J1)";  // SBO:0000247 pubchem.compound:68770 CHEBI:135533
  species tal_jejunum_2 in Vjejunum_2 = 0; tal_jejunum_2 is "talinolol (small intestine jejunum J2)";  // SBO:0000247 pubchem.compound:68770 CHEBI:135533
  species tal_entero_jejunum_2 in Ventero_jejunum_2 = 0; tal_entero_jejunum_2 is "talinolol enterocytes (small intestine jejunum J2)";  // SBO:0000247 pubchem.compound:68770 CHEBI:135533
  species tal_ileum_1 in Vileum_1 = 0; tal_ileum_1 is "talinolol (small intestine ileum I1)";  // SBO:0000247 pubchem.compound:68770 CHEBI:135533
  species tal_entero_ileum_1 in Ventero_ileum_1 = 0; tal_entero_ileum_1 is "talinolol enterocytes (small intestine ileum I1)";  // SBO:0000247 pubchem.compound:68770 CHEBI:135533
  species tal_ileum_2 in Vileum_2 = 0; tal_ileum_2 is "talinolol (small intestine ileum I2)";  // SBO:0000247 pubchem.compound:68770 CHEBI:135533
  species tal_entero_ileum_2 in Ventero_ileum_2 = 0; tal_entero_ileum_2 is "talinolol enterocytes (small intestine ileum I2)";  // SBO:0000247 pubchem.compound:68770 CHEBI:135533
  species tal_colon in Vcolon = 0; tal_colon is "talinolol (large intestine colon)";  // SBO:0000247 pubchem.compound:68770 CHEBI:135533
  species tal_entero_colon in Ventero_colon = 0; tal_entero_colon is "talinolol enterocytes (large intestine colon)";  // SBO:0000247 pubchem.compound:68770 CHEBI:135533

  // Parameters:
  // Fraction absorbed, i.e., only a fraction of the talinolol in the intestinal lumen is absorbed. This parameter determines how much of the talinol is excreted in every round of the enterohepatic circulation.
  // F_tal_abs of dose is absorbed. (1-F_tal_abs) is excreted in feces.
  // The effective fraction absorbed is lower, because P-glycoprotein transports part of the absorbed talinol back in the intestinal lumen!.
  F_tal_abs = 0.4548174 dimensionless; F_tal_abs is "fraction absorbed talinolol";  // SBO:0000002
  TALABS_Vmax = 2.05772 mmole_per_min_l; TALABS_Vmax is "Vmax for talinolol absorption";  // SBO:0000186
  // Talinolol is as substrate for
  // OATP1B3 (Km = 153 ± 137 µmol/l; Vmax = 168 ± 30.3 µmol/mgxmin),
  // OATP1B1 (Km = 301 ± 133 µmol/l; Vmax = 1135 ± 348 µmol/mgxmin),
  // OATP2B1 (Km = 459 ± 260 µmol/l; Vmax = 4.32 ± 1.33 µmol/mgxmin),
  // OATP1A2 (Km = 477 ± 158 µmol/l; Vmax = 0.61 ± 0.1 µmol/mgxmin)
  // NTCP (Km = 2560 ± 781 µmol/l; Vmax = 15944 ± 3741 µmol/mgxmin) {Roustom2017}
  TALABS_Km = 0.459 mM; TALABS_Km is "Km for talinolol absorption";  // SBO:0000027
  // parameter controls velocity (1.0 reference velocity, < 1.0 reduced velocity, > 1.0 increased velocity)
  f_velocity = 1 dimensionless; f_velocity is "parameter for velocity intestinal transport";  // SBO:0000002
  // parameter controls activity (1.0 reference activity, < 1.0 reduced activity, > 1.0 increased activity)
  f_OATP2B1 = 1 dimensionless; f_OATP2B1 is "parameter for OATP2B1 activity";  // SBO:0000002
  // parameter controls activity (1.0 reference activity, < 1.0 reduced activity, > 1.0 increased activity)
  f_PG = 1 dimensionless; f_PG is "parameter for P-glycoprotein activity";  // SBO:0000002
  TALEFL_Vmax = 0.3285851 per_min; TALEFL_Vmax is "Vmax for talinolol efflux (PG)";  // SBO:0000186
  TALEX_Vmax = 0.0006951768 per_min; TALEX_Vmax is "Vmax for talinolol export in plasma";  // SBO:0000186
  pgp_duodenum = 0.3 dimensionless; pgp_duodenum is "protein amount P-gp";  // SBO:0000002
  oatp2b1_duodenum = 0.45 dimensionless; oatp2b1_duodenum is "protein amount OATP2B1";  // SBO:0000002
  pgp_jejunum_1 = 0.4 dimensionless; pgp_jejunum_1 is "protein amount P-gp";  // SBO:0000002
  oatp2b1_jejunum_1 = 0.5 dimensionless; oatp2b1_jejunum_1 is "protein amount OATP2B1";  // SBO:0000002
  pgp_jejunum_2 = 0.5 dimensionless; pgp_jejunum_2 is "protein amount P-gp";  // SBO:0000002
  oatp2b1_jejunum_2 = 0.45 dimensionless; oatp2b1_jejunum_2 is "protein amount OATP2B1";  // SBO:0000002
  pgp_ileum_1 = 0.7 dimensionless; pgp_ileum_1 is "protein amount P-gp";  // SBO:0000002
  oatp2b1_ileum_1 = 0.45 dimensionless; oatp2b1_ileum_1 is "protein amount OATP2B1";  // SBO:0000002
  pgp_ileum_2 = 1.1 dimensionless; pgp_ileum_2 is "protein amount P-gp";  // SBO:0000002
  oatp2b1_ileum_2 = 0.45 dimensionless; oatp2b1_ileum_2 is "protein amount OATP2B1";  // SBO:0000002
  pgp_colon = 0.25 dimensionless; pgp_colon is "protein amount P-gp";  // SBO:0000002
  oatp2b1_colon = 0.5 dimensionless; oatp2b1_colon is "protein amount OATP2B1";  // SBO:0000002
  Ri_tal_duodenum = 0 mg_per_min; Ri_tal_duodenum is "Ri [mg/min] rate of infusion intestine talinolol";  // SBO:0000002
  Ri_tal_jejunum_1 = 0 mg_per_min; Ri_tal_jejunum_1 is "Ri [mg/min] rate of infusion intestine talinolol";  // SBO:0000002
  Ri_tal_jejunum_2 = 0 mg_per_min; Ri_tal_jejunum_2 is "Ri [mg/min] rate of infusion intestine talinolol";  // SBO:0000002
  Ri_tal_ileum_1 = 0 mg_per_min; Ri_tal_ileum_1 is "Ri [mg/min] rate of infusion intestine talinolol";  // SBO:0000002
  Ri_tal_ileum_2 = 0 mg_per_min; Ri_tal_ileum_2 is "Ri [mg/min] rate of infusion intestine talinolol";  // SBO:0000002
  Ri_tal_colon = 0 mg_per_min; Ri_tal_colon is "Ri [mg/min] rate of infusion intestine talinolol";  // SBO:0000002
  PODOSE_tal = 0 mg; PODOSE_tal is "oral dose tal [mg]";  // SBO:0000002
  POSTOMACH_tal = 0 mg; POSTOMACH_tal is "oral dose in stomach talinolol [mg]";  // SBO:0000002
  // Fast application to shift applied dose in the stomach.
  Ka_application_tal = 1000 per_hr; Ka_application_tal is "Ka [1/hr] application talinolol";  // SBO:0000002
  Ka_dis_tal = 2 per_hr; Ka_dis_tal is "Ka_dis [1/hr] dissolution tal";  // SBO:0000002
  Mr_tal = 363.495 g_per_mole; Mr_tal is "Molecular weight talinolol [g/mole]";  // SBO:0000647
  TALFLUX_DUODENUM_k = 0.06666667 per_min; TALFLUX_DUODENUM_k is "Transport rate duodenum";  // SBO:0000002
  TALFLUX_JEJUNUM_1_k = 0.01904762 per_min; TALFLUX_JEJUNUM_1_k is "Transport rate jejunum_1";  // SBO:0000002
  TALFLUX_JEJUNUM_2_k = 0.01904762 per_min; TALFLUX_JEJUNUM_2_k is "Transport rate jejunum_2";  // SBO:0000002
  TALFLUX_ILEUM_1_k = 0.01212121 per_min; TALFLUX_ILEUM_1_k is "Transport rate ileum_1";  // SBO:0000002
  TALFLUX_ILEUM_2_k = 0.01212121 per_min; TALFLUX_ILEUM_2_k is "Transport rate ileum_2";  // SBO:0000002
  absorption_duodenum has mmole_per_min; absorption_duodenum is "absorption talinolol duodenum";
  TALUPTAKE_duodenum has mmole_per_min; TALUPTAKE_duodenum is "net uptake talinolol duodenum";
  absorption_jejunum_1 has mmole_per_min; absorption_jejunum_1 is "absorption talinolol jejunum_1";
  TALUPTAKE_jejunum_1 has mmole_per_min; TALUPTAKE_jejunum_1 is "net uptake talinolol jejunum_1";
  absorption_jejunum_2 has mmole_per_min; absorption_jejunum_2 is "absorption talinolol jejunum_2";
  TALUPTAKE_jejunum_2 has mmole_per_min; TALUPTAKE_jejunum_2 is "net uptake talinolol jejunum_2";
  absorption_ileum_1 has mmole_per_min; absorption_ileum_1 is "absorption talinolol ileum_1";
  TALUPTAKE_ileum_1 has mmole_per_min; TALUPTAKE_ileum_1 is "net uptake talinolol ileum_1";
  absorption_ileum_2 has mmole_per_min; absorption_ileum_2 is "absorption talinolol ileum_2";
  TALUPTAKE_ileum_2 has mmole_per_min; TALUPTAKE_ileum_2 is "net uptake talinolol ileum_2";
  absorption_colon has mmole_per_min; absorption_colon is "absorption talinolol colon";
  TALUPTAKE_colon has mmole_per_min; TALUPTAKE_colon is "net uptake talinolol colon";

  // Assignment rules:
  Ventero_duodenum := 0.1*Vduodenum;
  Ventero_jejunum_1 := 0.1*Vjejunum_1;
  Ventero_jejunum_2 := 0.1*Vjejunum_2;
  Ventero_ileum_1 := 0.1*Vileum_1;
  Ventero_ileum_2 := 0.1*Vileum_2;
  Ventero_colon := 0.1*Vcolon;
  absorption_duodenum := oatp2b1_duodenum*TALABS_Vmax*Vgu*tal_duodenum/(tal_duodenum + TALABS_Km);
  TALUPTAKE_duodenum := TALABS_DUODENUM - TALEFL_DUODENUM;
  absorption_jejunum_1 := oatp2b1_jejunum_1*TALABS_Vmax*Vgu*tal_jejunum_1/(tal_jejunum_1 + TALABS_Km);
  TALUPTAKE_jejunum_1 := TALABS_JEJUNUM_1 - TALEFL_JEJUNUM_1;
  absorption_jejunum_2 := oatp2b1_jejunum_2*TALABS_Vmax*Vgu*tal_jejunum_2/(tal_jejunum_2 + TALABS_Km);
  TALUPTAKE_jejunum_2 := TALABS_JEJUNUM_2 - TALEFL_JEJUNUM_2;
  absorption_ileum_1 := oatp2b1_ileum_1*TALABS_Vmax*Vgu*tal_ileum_1/(tal_ileum_1 + TALABS_Km);
  TALUPTAKE_ileum_1 := TALABS_ILEUM_1 - TALEFL_ILEUM_1;
  absorption_ileum_2 := oatp2b1_ileum_2*TALABS_Vmax*Vgu*tal_ileum_2/(tal_ileum_2 + TALABS_Km);
  TALUPTAKE_ileum_2 := TALABS_ILEUM_2 - TALEFL_ILEUM_2;
  absorption_colon := oatp2b1_colon*TALABS_Vmax*Vgu*tal_colon/(tal_colon + TALABS_Km);
  TALUPTAKE_colon := TALABS_COLON - TALEFL_COLON;

  // Rate rules:
  PODOSE_tal' = -application_tal*Mr_tal;
  POSTOMACH_tal' = (application_tal - dissolution_tal)*Mr_tal;

  // Reactions:
  // Import via OATP2B1 is irreversible at apical membrane of enterocytes.
  TALABS_DUODENUM: tal_duodenum => tal_entero_duodenum; f_OATP2B1*F_tal_abs*absorption_duodenum; TALABS_DUODENUM is "absorption talinolol (OATP2B1) duodenum";  // SBO:0000655
  // Efflux is catalyzed by P-glycoprotein.
  TALEFL_DUODENUM: tal_entero_duodenum => tal_duodenum; f_PG*pgp_duodenum*TALEFL_Vmax*Vgu*tal_entero_duodenum; TALEFL_DUODENUM is "efflux talinolol P-glycoprotein duodenum";  // SBO:0000655
  TALEX_DUODENUM: tal_entero_duodenum => tal_ext; TALEX_Vmax*Vgu*tal_entero_duodenum; TALEX_DUODENUM is "talinolol export plasma duodenum";  // SBO:0000655
  // Import via OATP2B1 is irreversible at apical membrane of enterocytes.
  TALABS_JEJUNUM_1: tal_jejunum_1 => tal_entero_jejunum_1; f_OATP2B1*F_tal_abs*absorption_jejunum_1; TALABS_JEJUNUM_1 is "absorption talinolol (OATP2B1) jejunum_1";  // SBO:0000655
  // Efflux is catalyzed by P-glycoprotein.
  TALEFL_JEJUNUM_1: tal_entero_jejunum_1 => tal_jejunum_1; f_PG*pgp_jejunum_1*TALEFL_Vmax*Vgu*tal_entero_jejunum_1; TALEFL_JEJUNUM_1 is "efflux talinolol P-glycoprotein jejunum_1";  // SBO:0000655
  TALEX_JEJUNUM_1: tal_entero_jejunum_1 => tal_ext; TALEX_Vmax*Vgu*tal_entero_jejunum_1; TALEX_JEJUNUM_1 is "talinolol export plasma jejunum_1";  // SBO:0000655
  // Import via OATP2B1 is irreversible at apical membrane of enterocytes.
  TALABS_JEJUNUM_2: tal_jejunum_2 => tal_entero_jejunum_2; f_OATP2B1*F_tal_abs*absorption_jejunum_2; TALABS_JEJUNUM_2 is "absorption talinolol (OATP2B1) jejunum_2";  // SBO:0000655
  // Efflux is catalyzed by P-glycoprotein.
  TALEFL_JEJUNUM_2: tal_entero_jejunum_2 => tal_jejunum_2; f_PG*pgp_jejunum_2*TALEFL_Vmax*Vgu*tal_entero_jejunum_2; TALEFL_JEJUNUM_2 is "efflux talinolol P-glycoprotein jejunum_2";  // SBO:0000655
  TALEX_JEJUNUM_2: tal_entero_jejunum_2 => tal_ext; TALEX_Vmax*Vgu*tal_entero_jejunum_2; TALEX_JEJUNUM_2 is "talinolol export plasma jejunum_2";  // SBO:0000655
  // Import via OATP2B1 is irreversible at apical membrane of enterocytes.
  TALABS_ILEUM_1: tal_ileum_1 => tal_entero_ileum_1; f_OATP2B1*F_tal_abs*absorption_ileum_1; TALABS_ILEUM_1 is "absorption talinolol (OATP2B1) ileum_1";  // SBO:0000655
  // Efflux is catalyzed by P-glycoprotein.
  TALEFL_ILEUM_1: tal_entero_ileum_1 => tal_ileum_1; f_PG*pgp_ileum_1*TALEFL_Vmax*Vgu*tal_entero_ileum_1; TALEFL_ILEUM_1 is "efflux talinolol P-glycoprotein ileum_1";  // SBO:0000655
  TALEX_ILEUM_1: tal_entero_ileum_1 => tal_ext; TALEX_Vmax*Vgu*tal_entero_ileum_1; TALEX_ILEUM_1 is "talinolol export plasma ileum_1";  // SBO:0000655
  // Import via OATP2B1 is irreversible at apical membrane of enterocytes.
  TALABS_ILEUM_2: tal_ileum_2 => tal_entero_ileum_2; f_OATP2B1*F_tal_abs*absorption_ileum_2; TALABS_ILEUM_2 is "absorption talinolol (OATP2B1) ileum_2";  // SBO:0000655
  // Efflux is catalyzed by P-glycoprotein.
  TALEFL_ILEUM_2: tal_entero_ileum_2 => tal_ileum_2; f_PG*pgp_ileum_2*TALEFL_Vmax*Vgu*tal_entero_ileum_2; TALEFL_ILEUM_2 is "efflux talinolol P-glycoprotein ileum_2";  // SBO:0000655
  TALEX_ILEUM_2: tal_entero_ileum_2 => tal_ext; TALEX_Vmax*Vgu*tal_entero_ileum_2; TALEX_ILEUM_2 is "talinolol export plasma ileum_2";  // SBO:0000655
  // Import via OATP2B1 is irreversible at apical membrane of enterocytes.
  TALABS_COLON: tal_colon => tal_entero_colon; f_OATP2B1*F_tal_abs*absorption_colon; TALABS_COLON is "absorption talinolol (OATP2B1) colon";  // SBO:0000655
  // Efflux is catalyzed by P-glycoprotein.
  TALEFL_COLON: tal_entero_colon => tal_colon; f_PG*pgp_colon*TALEFL_Vmax*Vgu*tal_entero_colon; TALEFL_COLON is "efflux talinolol P-glycoprotein colon";  // SBO:0000655
  TALEX_COLON: tal_entero_colon => tal_ext; TALEX_Vmax*Vgu*tal_entero_colon; TALEX_COLON is "talinolol export plasma colon";  // SBO:0000655
  TALFLUX_DUODENUM_JEJUNUM_1: tal_duodenum => tal_jejunum_1; f_velocity*TALFLUX_DUODENUM_k*tal_duodenum*Vgu; TALFLUX_DUODENUM_JEJUNUM_1 is "talinolol transport duodenum to jejunum_1";  // SBO:0000655
  TALFLUX_JEJUNUM_1_JEJUNUM_2: tal_jejunum_1 => tal_jejunum_2; f_velocity*TALFLUX_JEJUNUM_1_k*tal_jejunum_1*Vgu; TALFLUX_JEJUNUM_1_JEJUNUM_2 is "talinolol transport jejunum_1 to jejunum_2";  // SBO:0000655
  TALFLUX_JEJUNUM_2_ILEUM_1: tal_jejunum_2 => tal_ileum_1; f_velocity*TALFLUX_JEJUNUM_2_k*tal_jejunum_2*Vgu; TALFLUX_JEJUNUM_2_ILEUM_1 is "talinolol transport jejunum_2 to ileum_1";  // SBO:0000655
  TALFLUX_ILEUM_1_ILEUM_2: tal_ileum_1 => tal_ileum_2; f_velocity*TALFLUX_ILEUM_1_k*tal_ileum_1*Vgu; TALFLUX_ILEUM_1_ILEUM_2 is "talinolol transport ileum_1 to ileum_2";  // SBO:0000655
  TALFLUX_ILEUM_2_COLON: tal_ileum_2 => tal_colon; f_velocity*TALFLUX_ILEUM_2_k*tal_ileum_2*Vgu; TALFLUX_ILEUM_2_COLON is "talinolol transport ileum_2 to colon";  // SBO:0000655
  TALEXC: tal_colon => tal_feces; (1 - F_tal_abs)*absorption_colon; TALEXC is "excretion talinolol (feces)";  // SBO:0000655
  TALINF_duodenum: => tal_duodenum; Ri_tal_duodenum/Mr_tal; TALINF_duodenum is "infusion talinolol (duodenum)";  // SBO:0000655
  TALINF_jejunum_1: => tal_jejunum_1; Ri_tal_jejunum_1/Mr_tal; TALINF_jejunum_1 is "infusion talinolol (jejunum_1)";  // SBO:0000655
  TALINF_jejunum_2: => tal_jejunum_2; Ri_tal_jejunum_2/Mr_tal; TALINF_jejunum_2 is "infusion talinolol (jejunum_2)";  // SBO:0000655
  TALINF_ileum_1: => tal_ileum_1; Ri_tal_ileum_1/Mr_tal; TALINF_ileum_1 is "infusion talinolol (ileum_1)";  // SBO:0000655
  TALINF_ileum_2: => tal_ileum_2; Ri_tal_ileum_2/Mr_tal; TALINF_ileum_2 is "infusion talinolol (ileum_2)";  // SBO:0000655
  TALINF_colon: => tal_colon; Ri_tal_colon/Mr_tal; TALINF_colon is "infusion talinolol (colon)";  // SBO:0000655
  application_tal: => $tal_stomach; Ka_application_tal/(60 min_per_hr)*PODOSE_tal/Mr_tal; application_tal is "application talinolol";
  dissolution_tal: $tal_stomach => tal_duodenum; Ka_dis_tal/(60 min_per_hr)*POSTOMACH_tal/Mr_tal; dissolution_tal is "dissolution talinolol";

  // Unit definitions:
  unit g_per_mole = gram / mole; g_per_mole is "g/mole";
  unit kg = 1000 gram;
  unit l_per_min = litre / (60 second); l_per_min is "l/min";
  unit l_per_min_mmole = litre / (60 second * 1e-3 mole); l_per_min_mmole is "l/min/mmole";
  unit m2 = metre^2; m2 is "meter^2";
  unit mM = 1e-3 mole / litre; mM is "mmole/liter";
  unit mg = 1e-3 gram;
  unit mg_per_min = 1e-3 gram / (60 second); mg_per_min is "mg/min";
  unit min = 60 second;
  unit min_per_hr = 60 second / (3600 second); min_per_hr is "min/hr";
  unit mmole = 1e-3 mole;
  unit mmole_per_min = 1e-3 mole / (60 second); mmole_per_min is "mmole/min";
  unit mmole_per_min_l = 1e-3 mole / (60 second * litre); mmole_per_min_l is "mmole/min/liter";
  unit per_hr = 1 / (3600 second); per_hr is "1/hr";
  unit per_min = 1 / (60 second); per_min is "1/min";
  unit per_min_l = 1 / (60 second * litre); per_min_l is "1/min/liter";
end
