// SBML level 3 version 2
// Created with https://github.com/matthiaskoenig/sbmlutils.

model talinolol_kidney(fup_tal, Vext, Vki, Vurine, tal_ext, tal_urine)
  // Model for talinolol elimination in the kidneys
  // Model for renal excretion of talinolol (tal) encoded in SBML format.
  // Import and secretion are not modeled explicitly but a lumped excretion reaction is used to describe urinary elimination of tal. Due to the minor contribution of talinolol metabolites these are not modeled.
  // On average, about 60% of talinolol and talinolol metabolites was excreted by kidney and about 40% extrarenally. {Trausch1995}
  // Other metabolites then talinolol are almost not detectable in urine. I.e. sum of metabolites is 0.33% of dose vs. talinolol 52.83 % dose {Trausch1995}
  // Terms of use
  // The content of this model has been carefully created in a manual research effort. This file has been created by Matthias König using sbmlutils. For questions contact koenigmx@hu-berlin.de. Copyright © 2023 Matthias König.
  // This work is licensed under a Creative Commons Attribution 4.0 International License.
  // Redistribution and use of any part of this model, with or without modification, are permitted provided that the following conditions are met:
  // Redistributions of this SBML file must retain the above copyright notice, this list of conditions and the following disclaimer.
  // Redistributions in a different form must reproduce the above copyright notice, this list of conditions and the following disclaimer in the documentation and/or other materials provided with the distribution.
  // This model is distributed in the hope that it will be useful, but WITHOUT ANY WARRANTY; without even the implied warranty of MERCHANTABILITY or FITNESS FOR A PARTICULAR PURPOSE.
  // model units - substance: mmole, time: min, volume: litre, area: m2, length: metre, extent: mmole

  // Compartments:
  compartment Vext = 4 litre; Vext is "plasma";  // SBO:0000290 ncit:C13356 BTO:0000131
  compartment Vki = 1.5 litre; Vki is "kidney";  // SBO:0000290 FMA:7203 BTO:0000671 ncit:C12415
  compartment Vurine = 1 litre;  // SBO:0000290 FMA:12274 ncit:C13283 BTO:0001419

  // Species:
  species tal_ext in Vext = 0; tal_ext is "talinolol (plasma)";  // SBO:0000247 pubchem.compound:68770 CHEBI:135533
  // Urinary species are in amounts.
  substanceOnly species tal_urine in Vurine = 0; tal_urine is "talinolol (urine)";  // SBO:0000247 pubchem.compound:68770 CHEBI:135533

  // Parameters:
  // Parameter controls the health state/renal function (1.0 reference function, < 1.0 reduced function, > 1.0 increased function)
  f_renal_function = 1 dimensionless; f_renal_function is "parameter for kidney function";  // SBO:0000002
  fup_tal = 0.4 dimensionless; fup_tal is "fraction unbound in plasma tal";  // SBO:0000009
  // determined via parameter fitting
  TALEX_k = 0.9592007 per_min; TALEX_k is "rate urinary excretion talinolol";  // SBO:0000009

  // Reactions:
  TALEX: tal_ext => tal_urine; f_renal_function*TALEX_k*Vki*tal_ext*fup_tal; TALEX is "excretion talinolol";  // SBO:0000655 ncit:C75913

  // Unit definitions:
  unit g_per_mole = gram / mole; g_per_mole is "g/mole";
  unit l_per_min = litre / (60 second); l_per_min is "l/min";
  unit l_per_min_mmole = litre / (60 second * 1e-3 mole); l_per_min_mmole is "l/min/mmole";
  unit m2 = metre^2; m2 is "meter^2";
  unit mM = 1e-3 mole / litre; mM is "mmole/liter";
  unit mg = 1e-3 gram;
  unit min = 60 second;
  unit mmole = 1e-3 mole;
  unit mmole_per_min = 1e-3 mole / (60 second); mmole_per_min is "mmole/min";
  unit mmole_per_min_l = 1e-3 mole / (60 second * litre); mmole_per_min_l is "mmole/min/liter";
  unit per_min = 1 / (60 second); per_min is "1/min";
  unit per_min_l = 1 / (60 second * litre); per_min_l is "1/min/liter";
end
