// SBML level 3 version 2
// Created with https://github.com/matthiaskoenig/sbmlutils.

model talinolol_liver(fup_tal, Vext, Vli, Vbi, Vduodenum, tal_ext, tal_duodenum)
  // Model for talinolol elimination in the liver
  // Model for hepatic metabolism of talinolol via CYP3A4 in in SBML.
  // Talinolol metabolization is neglegtable and was not modeld explicitly. Talinolol is taken up in the liver and subsequently can be excreted in the bile and be transported back to the intestine via the enterohepatic circulation (EHC).
  // enterohepatic circulation (see Terhaag1989); “The biliary clearance amounted to 43 ml/hr/kg (range: 13-212 ml/hr/kg).
  // Terms of use
  // The content of this model has been carefully created in a manual research effort. This file has been created by Matthias König using sbmlutils. For questions contact koenigmx@hu-berlin.de. Copyright © 2023 Matthias König.
  // This work is licensed under a Creative Commons Attribution 4.0 International License.
  // Redistribution and use of any part of this model, with or without modification, are permitted provided that the following conditions are met:
  // Redistributions of this SBML file must retain the above copyright notice, this list of conditions and the following disclaimer.
  // Redistributions in a different form must reproduce the above copyright notice, this list of conditions and the following disclaimer in the documentation and/or other materials provided with the distribution.
  // This model is distributed in the hope that it will be useful, but WITHOUT ANY WARRANTY; without even the implied warranty of MERCHANTABILITY or FITNESS FOR A PARTICULAR PURPOSE.
  // model units - substance: mmole, time: min, volume: litre, area: m2, length: metre, extent: mmole

  // Compartments:
  compartment Vext = 4 litre; Vext is "plasma";  // SBO:0000290 ncit:C13356 BTO:0000131
  compartment Vli = 1.5 litre; Vli is "liver";  // SBO:0000290 FMA:7197 BTO:0000759 ncit:C12392
  compartment Vbaso = NaN; Vbaso has m2; Vbaso is "basolateral membrane";  // SBO:0000290 FMA:84669 GO:0016323
  compartment Vapical = NaN; Vapical has m2; Vapical is "apical membrane";  // SBO:0000290 FMA:84666 GO:0016324
  compartment Vbi = 1 litre; Vbi is "bile";  // SBO:0000290 FMA:62971 ncit:C13192
  compartment Vduodenum = 0.1 litre; Vduodenum is "intestinal lumen (duodenum)";  // SBO:0000290 FMA:14586 UBERON:0018543

  // Species:
  species tal_ext in Vext = 0; tal_ext is "talinolol (plasma)";  // SBO:0000247 pubchem.compound:68770 CHEBI:135533
  species tal in Vli = 0; tal is "talinolol (liver)";  // SBO:0000247 pubchem.compound:68770 CHEBI:135533
  // Bile talinolol in amount.
  substanceOnly species tal_bi in Vbi = 0; tal_bi is "talinolol (bile)";  // SBO:0000247 pubchem.compound:68770 CHEBI:135533
  species tal_duodenum in Vduodenum = 0; tal_duodenum is "talinolol (duodenum)";  // SBO:0000247 pubchem.compound:68770 CHEBI:135533

  // Parameters:
  fup_tal = 0.4 dimensionless; fup_tal is "fraction unbound in plasma tal";  // SBO:0000009
  // Total talinolol excreted in bile.
  Abile_tal = 0 mmole; Abile_tal is "cumulative talinolol (bile)";  // SBO:0000009 pubchem.compound:68770 CHEBI:135533
  // Concentration of talinolol in bile calculated via mean bile flow. Bile flow from Terhaag1989 as mean median bile flow: 46 [ml/hr].
  bile_flow = 0.0007666667 l_per_min;  // SBO:0000009; hasPart ncit:C13192 ncit:C41141
  // Concentration of talinolol in bile calculated via mean bile flow.
  Cbile_tal has mM; Cbile_tal is "talinolol (bile)";  // SBO:0000009 pubchem.compound:68770 CHEBI:135533
  TALIM_Vmax = 0.00998467 mmole_per_min_l; TALIM_Vmax is "Vmax for talinolol import";  // SBO:0000186
  // Talinolol is as substrate for
  // OATP1B3 (Km = 153 ± 137 µmol/l; Vmax = 168 ± 30.3 µmol/mgxmin),
  // OATP1B1 (Km = 301 ± 133 µmol/l; Vmax = 1135 ± 348 µmol/mgxmin),
  // OATP2B1 (Km = 459 ± 260 µmol/l; Vmax = 4.32 ± 1.33 µmol/mgxmin),
  // OATP1A2 (Km = 477 ± 158 µmol/l; Vmax = 0.61 ± 0.1 µmol/mgxmin)
  // NTCP (Km = 2560 ± 781 µmol/l; Vmax = 15944 ± 3741 µmol/mgxmin) {Roustom2017}
  TALIM_Km_tal = 0.301 mM; TALIM_Km_tal is "Km for talinolol import";  // SBO:0000027
  f_OATP1B1 = 1 dimensionless; f_OATP1B1 is "factor for scanning OATP1B1 activity";  // SBO:0000002
  TALEX_k = 0.1500854 per_min; TALEX_k is "rate for talinolol export in bile";  // SBO:0000009
  f_PG = 1 dimensionless; f_PG is "factor for scanning MDR1 activity";  // SBO:0000002
  f_EHC = 1 dimensionless; f_EHC is "factor for modifying EHC";  // SBO:0000002

  // Assignment rules:
  Cbile_tal := TALEX/bile_flow;

  // Rate rules:
  // Calculated via integration of the talinol bile excretion rate.
  Abile_tal' = TALEX;

  // Reactions:
  TALIM: tal_ext -> tal; f_OATP1B1*TALIM_Vmax/TALIM_Km_tal*Vli*(tal_ext*fup_tal - tal)/(1 + tal_ext/TALIM_Km_tal + tal/TALIM_Km_tal); TALIM is "talinolol import";  // SBO:0000655
  // This could be via MDR1 or MRP2. Using trick to track total amount of talinolol excreted in bile.
  TALEX: tal => tal_bi; f_PG*TALEX_k*Vli*tal; TALEX is "talinolol bile export";  // SBO:0000655
  // Transport of talinolol via bile to the intestinal lumen (duodenum). This is the enterohepatic circulation of talinolol.
  // Irreversible transport of talinolol via Mass-Action-Kinetics.
  // This is a dummy process which allows to simulate cholocystectomy.
  TALEHC: tal_bi => tal_duodenum; f_EHC*TALEX; TALEHC is "talinolol enterohepatic circulation";  // SBO:0000655

  // Unit definitions:
  unit g_per_mole = gram / mole; g_per_mole is "g/mole";
  unit l_per_min = litre / (60 second); l_per_min is "l/min";
  unit l_per_min_mmole = litre / (60 second * 1e-3 mole); l_per_min_mmole is "l/min/mmole";
  unit m2 = metre^2; m2 is "meter^2";
  unit mM = 1e-3 mole / litre; mM is "mmole/liter";
  unit mg = 1e-3 gram;
  unit min = 60 second;
  unit ml_per_min = 1e-3 litre / (60 second); ml_per_min is "ml/min";
  unit mmole = 1e-3 mole;
  unit mmole_per_min = 1e-3 mole / (60 second); mmole_per_min is "mmole/min";
  unit mmole_per_min_l = 1e-3 mole / (60 second * litre); mmole_per_min_l is "mmole/min/liter";
  unit per_min = 1 / (60 second); per_min is "1/min";
  unit per_min_l = 1 / (60 second * litre); per_min_l is "1/min/liter";
end
